*node, nset=allnodes
1 , 0.0 , 0.0 , 0.0
2 , 0.1 , 0.0 , 0.0
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*element, type=c3d8, elset=allelems
1 , 1 , 2 , 13 , 12 , 122 , 123 , 134 , 133
2 , 2 , 3 , 14 , 13 , 123 , 124 , 135 , 134
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*nset, nset=v1
1211
*nset, nset=v2
1221
*nset, nset=v3
1331
*nset, nset=v4
1321
*nset, nset=v5
1
*nset, nset=v6
11
*nset, nset=v7
121
*nset, nset=v8
111
*nset, nset=e1, generate
122 , 1090 , 121
*nset, nset=e2, generate
132 , 1100 , 121
*nset, nset=e3, generate
242 , 1210 , 121
*nset, nset=e4, generate
232 , 1200 , 121
*nset, nset=e5, generate
1212 , 1220 , 1
*nset, nset=e6, generate
1232 , 1320 , 11
*nset, nset=e7, generate
1322 , 1330 , 1
*nset, nset=e8, generate
1222 , 1310 , 11
*nset, nset=e9, generate
2 , 10 , 1
*nset, nset=e10, generate
22 , 110 , 11
*nset, nset=e11, generate
112 , 120 , 1
*nset, nset=e12, generate
12 , 100 , 11
*nset, nset=f1
133 ,
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*nset, nset=f3
143 ,
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*nset, nset=f2
123 ,
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*nset, nset=f4
233 ,
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*nset, nset=f5
1223 ,
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*nset, nset=f6
13 ,
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**edge constraint equations
*equation
4
e9,  1 , 1.0, v5,  1 , -1.0, e5,  1 , -1.0, v1,  1 , 1.0
*equation
4
e9,  2 , 1.0, v5,  2 , -1.0, e5,  2 , -1.0, v1,  2 , 1.0
*equation
4
e9,  3 , 1.0, v5,  3 , -1.0, e5,  3 , -1.0, v1,  3 , 1.0
*equation
4
e11,  1 , 1.0, v8,  1 , -1.0, e5,  1 , -1.0, v1,  1 , 1.0
*equation
4
e11,  2 , 1.0, v8,  2 , -1.0, e5,  2 , -1.0, v1,  2 , 1.0
*equation
4
e11,  3 , 1.0, v8,  3 , -1.0, e5,  3 , -1.0, v1,  3 , 1.0
*equation
4
e7,  1 , 1.0, v4,  1 , -1.0, e5,  1 , -1.0, v1,  1 , 1.0
*equation
4
e7,  2 , 1.0, v4,  2 , -1.0, e5,  2 , -1.0, v1,  2 , 1.0
*equation
4
e7,  3 , 1.0, v4,  3 , -1.0, e5,  3 , -1.0, v1,  3 , 1.0
*equation
4
e6,  1 , 1.0, v2,  1 , -1.0, e8,  1 , -1.0, v1,  1 , 1.0
*equation
4
e6,  2 , 1.0, v2,  2 , -1.0, e8,  2 , -1.0, v1,  2 , 1.0
*equation
4
e6,  3 , 1.0, v2,  3 , -1.0, e8,  3 , -1.0, v1,  3 , 1.0
*equation
4
e10,  1 , 1.0, v6,  1 , -1.0, e8,  1 , -1.0, v1,  1 , 1.0
*equation
4
e10,  2 , 1.0, v6,  2 , -1.0, e8,  2 , -1.0, v1,  2 , 1.0
*equation
4
e10,  3 , 1.0, v6,  3 , -1.0, e8,  3 , -1.0, v1,  3 , 1.0
*equation
4
e12,  1 , 1.0, v5,  1 , -1.0, e8,  1 , -1.0, v1,  1 , 1.0
*equation
4
e12,  2 , 1.0, v5,  2 , -1.0, e8,  2 , -1.0, v1,  2 , 1.0
*equation
4
e12,  3 , 1.0, v5,  3 , -1.0, e8,  3 , -1.0, v1,  3 , 1.0
*equation
4
e2,  1 , 1.0, v2,  1 , -1.0, e1,  1 , -1.0, v1,  1 , 1.0
*equation
4
e2,  2 , 1.0, v2,  2 , -1.0, e1,  2 , -1.0, v1,  2 , 1.0
*equation
4
e2,  3 , 1.0, v2,  3 , -1.0, e1,  3 , -1.0, v1,  3 , 1.0
*equation
4
e3,  1 , 1.0, v3,  1 , -1.0, e1,  1 , -1.0, v1,  1 , 1.0
*equation
4
e3,  2 , 1.0, v3,  2 , -1.0, e1,  2 , -1.0, v1,  2 , 1.0
*equation
4
e3,  3 , 1.0, v3,  3 , -1.0, e1,  3 , -1.0, v1,  3 , 1.0
*equation
4
e4,  1 , 1.0, v4,  1 , -1.0, e1,  1 , -1.0, v1,  1 , 1.0
*equation
4
e4,  2 , 1.0, v4,  2 , -1.0, e1,  2 , -1.0, v1,  2 , 1.0
*equation
4
e4,  3 , 1.0, v4,  3 , -1.0, e1,  3 , -1.0, v1,  3 , 1.0
**face constraint equations
*equation
4
f3,  1 , 1.0, v2,  1 , -1.0, f1,  1 , -1.0, v1,  1 , 1.0
*equation
4
f3,  2 , 1.0, v2,  2 , -1.0, f1,  2 , -1.0, v1,  2 , 1.0
*equation
4
f3,  3 , 1.0, v2,  3 , -1.0, f1,  3 , -1.0, v1,  3 , 1.0
*equation
4
f4,  1 , 1.0, v4,  1 , -1.0, f2,  1 , -1.0, v1,  1 , 1.0
*equation
4
f4,  2 , 1.0, v4,  2 , -1.0, f2,  2 , -1.0, v1,  2 , 1.0
*equation
4
f4,  3 , 1.0, v4,  3 , -1.0, f2,  3 , -1.0, v1,  3 , 1.0
*equation
4
f6,  1 , 1.0, v5,  1 , -1.0, f5,  1 , -1.0, v1,  1 , 1.0
*equation
4
f6,  2 , 1.0, v5,  2 , -1.0, f5,  2 , -1.0, v1,  2 , 1.0
*equation
4
f6,  3 , 1.0, v5,  3 , -1.0, f5,  3 , -1.0, v1,  3 , 1.0
**vertex constraint equations
*equation
4
v3,  1 , 1.0, v2,  1 , -1.0, v4,  1 , -1.0, v1,  1 , 1.0
*equation
4
v3,  2 , 1.0, v2,  2 , -1.0, v4,  2 , -1.0, v1,  2 , 1.0
*equation
4
v3,  3 , 1.0, v2,  3 , -1.0, v4,  3 , -1.0, v1,  3 , 1.0
*equation
4
v7,  1 , 1.0, v6,  1 , -1.0, v4,  1 , -1.0, v1,  1 , 1.0
*equation
4
v7,  2 , 1.0, v6,  2 , -1.0, v4,  2 , -1.0, v1,  2 , 1.0
*equation
4
v7,  3 , 1.0, v6,  3 , -1.0, v4,  3 , -1.0, v1,  3 , 1.0
*equation
4
v8,  1 , 1.0, v5,  1 , -1.0, v4,  1 , -1.0, v1,  1 , 1.0
*equation
4
v8,  2 , 1.0, v5,  2 , -1.0, v4,  2 , -1.0, v1,  2 , 1.0
*equation
4
v8,  3 , 1.0, v5,  3 , -1.0, v4,  3 , -1.0, v1,  3 , 1.0
*equation
4
v6,  1 , 1.0, v5,  1 , -1.0, v2,  1 , -1.0, v1,  1 , 1.0
*equation
4
v6,  2 , 1.0, v5,  2 , -1.0, v2,  2 , -1.0, v1,  2 , 1.0
*equation
4
v6,  3 , 1.0, v5,  3 , -1.0, v2,  3 , -1.0, v1,  3 , 1.0
*****************************************************************************************
*SOLID SECTION,ELSET=allelems ,MATERIAL=Inconal625
*MATERIAL,NAME=Inconal625
*USER MATERIAL,CONSTANTS=59,TYPE=MECHANICAL
***exactly 8 entries per row, as many rows needed
1123.0,8.3769e-09,651400000.0,0.188E-04,0.0,-51.07,0.24833E+06,-12.77
0.151021E+06,-44.39,0.125755E+06,2.75,0.2492E-06,20864518.99657374,10.0,6.0003780484405285e-18
0.1220,0.1220,0.07,0.6250,0.1370,0.1220,9.0,110.0
0.10E+08,1.0669902813891413e-18,0.138E-22,0.0,0.78,1.15,18,0.0
0.1,1000.0,1.0,5.0,90000.0,0.00019,0.75,0.81
0.000573,5.8e-05,2.9564202432248526e-06,1,8.31,0.42,-8.8,-44.0
0.2368E+06,-22.0,0.153999E+06,-30.0,0.1328E+06,1.0,1.4,8.2e-05
0.0,0.7,0
*DEPVAR
237
*****************************************************************************************
*STEP,AMPLITUDE=RAMP,NLGEOM,INC=70000
*STATIC
0.001,5.0,0.00001,0.2
*CONTROLS,PARAMETER=TIME INCREMENTATION
8,16,18,36,20,8,24,20
*BOUNDARY
v1,1,3,0.0
v2,2,3,0.0
v4,1,1,0.0
v4,3,3,0.0
v4,2,2,0.05
v5,1,2,0.0
******************************************************************************************************
*OUTPUT,FIELD,time interval=0.1
*ELEMENT OUTPUT,ELSET=allelems,POSITION=INTEGRATION POINTS,VARIABLE=PRESELECT
E,S,IVOL,SDV56
*NODE OUTPUT,NSET=ALLNODES,VARIABLE=PRESELECT
U,RF
*OUTPUT,HISTORY,FREQUENCY=1,VARIABLE=PRESELECT
*NODE OUTPUT,NSET=v4,VARIABLE=PRESELECT
U
RF
*END STEP
